# 3.3 Graphen von Potenzfunktionen f(x) = c * x^n
# B_428
# c)
# 1)
y(x) := a*x^2 → a*x^2
a := [y(12) == 15] solve, a → 5/48
F_1 := [0, 1/(4*a)] → [0, 12/5] = [0, 2.4]
# 2)
clear(a)
y(x) := a*x^2 → a*x^2
a := [y(24) == 15] solve, a → 5/192
F_2 := [0, 1/(4*a)] → [0, 48/5] = [0, 9.6]
[R] := F_2[:, 1]/F_1[:, 1] → [4.0]
R = 4
# B_310
# a)
V(BHD) := BHD^2/1000
V(10) = 0.1
V(100) = 10
V(20) = 0.4
V(30) = 0.9
# A: Die Skalierung geht von 1 bis 11.
# 3.4 Null-, Extrem- und Wendestellen & Monotonieverhalten bei Polynomfunktionen zweiten Grades
# B_445
# a)
clear(a, b, c)
h(x) := a*x^2 + b*x + c → a*x^2 + b*x + c
h(x) := a*x^2 + c → a*x^2 + c
[a, c] := [h(0) == 0.28; h(-2.1) == 1.3; h(2.1) == 1.3] solve, a, c → [0.231292517007, 0.28]
h(x) := a*x^2 + c → 0.231292517007*x^2 + 0.28
a → 0.231292517007
# B_377
# d)
h(x) := x^3 - 6*x^2 + 7*x + 8
A := [0, 8]
P := [5, 20]
d := sqrt(5^2 + (20 - 8)^2) = 13
h(5) == 20 → 0
h(x) == 20 solve, x, assume, x == real, float → 5.08772982228
# A: Es liegt nicht auf der Flugbahn.
# B_031
# c)
# A: Da es eine Polynomfunktion dritten Grades ist, benötigt es drei bekannte Werte.
clear(a, b, c, x)
f(x) := a*x^2 + b*x + c → a*x^2 + b*x + c
[a, b, c] := [f(3) == 5; f(12) == 7; f'(3) == tan(46°)] solve, a, b, c → [(-(9*tan(46*°)) + 2)/81, (45*tan(46*°) - 4)/27, (-(36*tan(46*°)) + 47)/9] = [-0.0903676, 1.57774, 1.0801]
f(x) := a*x^2 + b*x + c → -0.0903675657298*x^2 + 1.57773570817*x + 1.08010096706
