# 5.1 Daten statistisch analysieren, darstellen und anhand diesen argumentieren
# A_322
# b)
# 1)
# 1. Falsch
# 2. Falsch
# 3. Wahr
# 4. Falsch
# 5. Falsch
# 2)
240/190 - 1 = 0.263158  # 26.3%
# 5.2 Boxplots & Lage- und Streuungsmaße empirischer Daten
# A_348
# a)
# 1)
25621 - 15726 = 9895
# A_344
# a)
# 1)
x := (H_1 + 2*H_2)/(H_0 + H_1 + H_2) → (2*H_2 + H_1)/(H_2 + H_1 + H_0)
# 2)
# -> 4. Aufgabe
# 3)
# -> 1: 0
# -> 2: 7
# 5.3 Wahrscheinlichkeitsrechnung & Zusammenhang Wahrscheinlichkeit und Häufigkeiten
# B_499
# a)
# 1)
(5 + 4 + 3 + 2 + 1)/36 = 0.416667  # 41.7%
# 2)
1 + 6 → 7
2 + 5 → 7
3 + 4 → 7
4 + 3 → 7
5 + 2 → 7
6 + 1 → 7
6/36 → 1/6
# B_115
# a)
[
    2, 3, 4, 5, 6, 7, 8, 9, 10, 11, 12;
    1/36, 2/36, 3/36, 4/36, 5/36, 6/36, 5/36, 4/36, 3/36, 2/36, 1/36
]
P_1 := 4/36 + 5/36 + 6/36 + 5/36 = 0.555556
P_2 := 1 - P_1 → 0.444444444444
# B_329
# c)
3/57 = 0.0526316
(1 - 30/57)^n → (9/19)^n
# A: Der Ausdruck entspricht der Wahrscheinlichkeit, dass man n Anfahrten keine rote Ampel empfängt.
# 5.4 Wahrscheinlichkeitsrechnung anhand Baumdiagramme
# A_325
# b)
# 1)
# 7/12  5/12
# 6/11 5/11  7/11 4/11
# 2)
1 - 5/12*4/11 → 28/33 = 0.848485  # 84.8%
# A_183
# d)
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# P ist die Wahrscheinlichkeit, dass min. ein Schuss gehalten wird
# A_353
# b)
# 1)
P := 0.55
n := 7
# -> B
# -> C
# 2)
P := 0.18
n := 10
# c)
# 0.55  0.45
# 0.125 0.875  x 1-x
x := 0.55*0.125 + 0.45*x == 0.08 solve, x →  # error: Bad solve variable.
x =  # error: This variable is undefined. Check that the label is set correctly.
# A_312
# d)
# 1)
# 0.5  0.5
# 0.65 0.35  0.55 0.45
# 2)
# A: Chance, dass eine Person eine Besserung verspürt
# 5.5 Binomialverteilung modellieren und berechnen
# A_344
# c)
P := 0.007
n := 300
# 1)
P_i := 1 - P = 0.993
pbinom(2, n, P) = 0.649537  # -> max. x aus n mit P=Wahrscheinlichkeit
# 2)
# Min. 1 Gepäckstück ist beim Transport beschädigt
# A_282
# b)
P := 6/8 = 0.75
n := 8
dbinom(3, 5, P) = 0.263672  # -> genau x mal aus n mit P=Wahrscheinlichkeit
# c)
# 1: mindestens 1 Kugel grün
# 2: 1 - (5/12)^3
# A_297
# d)
# 1)
# Min. einmal kann sie gehen
# A_302
# d)
# 1)
# 1: D
# 2: A
# 5.6 Normalverteilung und Wahrscheinlichkeitsdichte
# A_297
# c)
# 1)
μ := 14
σ := 1.5
# 2)
# Ab Punkt 16 bis ∞
# A_347
# c)
# 1)
X ≥ 137
# A_356
# b)
# 1)
μ := 0.5
σ := 0.1
# A_238
# d)
μ := 16
σ := 0.3
p := 1 - pnorm(16.2, μ, σ) = 0.252493  # 25.2%
# A_190
# a)
μ := 180
σ := 20
Q_2 := 140
# Bis Abschnitt 200
# A_098
# b)
μ := 3.6
σ := 0.7
a := qnorm(1 - 0.1, μ, σ) = 4.49709
# Kontrolle:
1 - pnorm(a, μ, σ) = 0.1
# B_T_5.1 Normalverteilung mit μ und σ
# B_602
# c)
# 1)
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# 2) Stichprobenmittelwert
μ := 5.8
σ := 1.2
n := 9
σ_s := σ/sqrt(n) = 0.4
pnorm(6, μ, σ_s) - pnorm(5, μ, σ_s) = 0.668712  # 66.9%
# B_577
# a)
# 1)
μ_A == μ_B
σ_A < σ_B
# 2)
UG := 430
OG := 590
P := 0.7
μ := (UG + OG)/2 = 510
z := qnorm((1 - P)/2, 0, 1) = -1.03643
clear(σ)
z == (UG - μ)/σ solve, σ → 77.1877872818
# B_315
# c)
UG := 780
OG := 1140
μ := (UG + OG)/2 = 960
P := 0.95
z := qnorm((1 - P)/2, 0, 1) = -1.95996
z == (UG - μ)/σ solve, σ → 91.8384222464
