# Aufgaben der Maturathemen
# B_T_1.1 Fehlerrechnung
# B_541
# c)
# 1)
L_1 := 2*sqrt((h/2)^2 + (R - r)^2)  # error: {0} has multiple definitions, you must specify the label to select the definition that you want.
# 2)
L_1/L - 1 == -0.015
# L_1 ist 1.5% kleiner als L. Der Fehler ist daher -1.5%.
# B_430
# a)
R(T) := 100*(1 + 0.00385*T - 5.775*10^-7*T^2)
R_1 := R(450) = 261.556
R := 260
R_1/R - 1 = 0.00598317  # -> 0.6% ist der Fehler
|R_1 - 260|/260 = 0.00598317
# B_050
a := 0.1
b := 2500
T_0 := 373.15
# b)
R(T) := a*e^(b/T) → 0.1*e^(2500.0/T)
R(T_0) = 81.2177
k := R'(T_0) = -1.45822
f(x) := k*x + d  # error: This variable is undefined. Check that the label is set correctly.
d := [f(T_0) == R(T_0)] solve, d → 625.353633358
f(x) := k*x + d → -1.45822298744*x + 625.353633358
T := 390
R_T1 := f(390) = 56.6467
R_T := R(390) = 60.805
|R_T1 - R_T|/R_T = 0.0683873  # -> 6.8% Fehler
# -> B_567 für Aufgabe mit Stochastik
# B_T2_1.2 Komplexe Zahlen
# B_510
# a)
# 1)
i := sqrt(-1) = 1i
2*e^(-i*π/2) = -2i
# 2)
z_2 := 4i - 3
z_3 := -4i - 3
# b)
clear(a, b)
i*i → -1
(a + b*i)*(a - b*i) simplify → b^2 + a^2
